<?xml version="1.0"?>
<Node name="root" dt="0.002" showVisualModels="0" showBehaviorModels="1" showCollisionModels="1" showMappings="0" showForceFields="0" showWireFrame="0" gravity="0 -98.81 0">
 	<FreeMotionAnimationLoop />
	<GenericConstraintSolver tolerance="1e-4"  maxIterations="100" unbuilt="false" printLog="0"/>
	<CollisionPipeline depth="6" verbose="1" draw="0"/>
	<BruteForceDetection name="N2" />
	<LocalMinDistance name="localmindistance" alarmDistance="0.08" contactDistance="0.05" coneFactor="0.5" angleCone="0.1" filterIntersection="true"/>
	<CollisionResponse name="Response" response="FrictionContact" />
	<CollisionGroup name="Group" />
	<!--<VisualStyle name="VisualStyle" displayFlags="showBehaviorModels showForceFields showCollisionModels" />-->


<!-- !! MOTION !! 	-->
   <Node name="BVH">
    <MechanicalObject name="Articulations" template="Vec1d"/>
	<!--<UncoupledConstraintCorrection compliance="0.0001"/>-->
    <Node name="6D_DOFs1">
      <MechanicalObject name="6D_Dof" template="Rigid"/>
      <UniformMass mass="0.5 1 0.01 0 0 0 0.1 0 0 0 0.1" printLog="false" />
	  <ArticulatedSystemMapping input1="@../Articulations" input2="" output="@6D_Dof"/>

    </Node>
    <ArticulatedHierarchyContainer filename="Extension.bvh"/>
    <ArticulatedHierarchyBVHController />
  </Node>


<!--------------------------- SUTURE REST SHAPE  -------------------------------->

	<Node name="topoLines_suture">
		<WireRestShape template="Rigid" printLog="0" name="sutureRestShape" length="4"  straightLength="4" spireDiameter="4000.0" spireHeight="0.0"
					    densityOfBeams="15 0" numEdges="150" numEdgesCollis="150 0"  youngModulus="1000000" youngModulusExtremity="10000"/> <!-- silicone -->

		<EdgeSetTopologyContainer name="meshLinesSuture" />
		<EdgeSetTopologyModifier   name="Modifier" />
		<EdgeSetTopologyAlgorithms name="TopoAlgo"   template="Rigid" />
		<EdgeSetGeometryAlgorithms name="GeomAlgo"   template="Rigid" />
		<MechanicalObject template="Rigid" name="dofTopo1" />
	</Node>


	<Node name="AdaptiveBeam">
		<EulerImplicit rayleighStiffness="0.08" rayleighMass="0.08" printLog="false" />
		<BTDLinearSolver subpartSolve="0" verification="0" verbose="0"/>

		<!--
		<RegularGrid name="meshLinesCombined"
		nx="60" ny="1" nz="1"
		xmin="0.0" xmax="1.0"
		ymin="0" ymax="0"
		zmin="1" zmax="1"
		/>	-->

		<EdgeSetTopologyContainer name="meshSuture" />
		<EdgeSetTopologyModifier   name="Modifier" />
		<EdgeSetTopologyAlgorithms name="TopoAlgo"   template="Rigid" />
		<EdgeSetGeometryAlgorithms name="GeomAlgo"   template="Rigid" />


		<MechanicalObject template="Rigid" name="DOFs" showIndices="0"/>

		<WireBeamInterpolation name="InterpolSuture" WireRestShape="@../topoLines_suture/sutureRestShape" radius="0.05" printLog="0" dofsAndBeamsAligned="false"/>
		<AdaptiveBeamForceFieldAndMass name="SutureForceField" interpolation="InterpolSuture" massDensity="1.0" elongationFactor="10" /> <!--stiff silicone E = 10000 MPa // 1550 Kg/m3-->
		<SutureController template="Rigid" name="m_ircontroller" printLog="0"  startingPos="-4 0 0 0 0 0 1" interpolation="InterpolSuture"  threshold="1e-3" maxBendingAngle="1e6"/>
<!--		<AdaptiveBeamLengthConstraint interpolation="@InterpolSuture"/>	-->
		<RestShapeSpringsForceField stiffness="1e4"  angularStiffness="1e1"  external_rest_shape="../BVH/6D_DOFs1/6D_Dof" points="15" external_points="1" />

		<LinearSolverConstraintCorrection printLog="false" wire_optimization="true"/>

		<FixedConstraint name="FixedConstraint" indices="0" />

		<Node name="ConstrainedFames">
			<MechanicalObject name="AttachedFrame" template="Rigid" position=" 0 0 0 0 0 0 1" />
			<UniformMass mass="0.5 1 0.01 0 0 0 0.1 0 0 0 0.1" printLog="false" />
			<AdaptiveBeamMapping  name="FrameMap"  interpolation="../InterpolSuture" useCurvAbs="1" printLog="0" points="4 0 0" />
		</Node>


		<Node name="Collis">
				<RegularGrid name="test"
				nx="120" ny="1" nz="1"
				xmin="0.0" xmax="4"
				ymin="0" ymax="0"
				zmin="0" zmax="0"
				/>
				<MechanicalObject name="CollisionDOFs" debugViewIndices="0"/>
				<AdaptiveBeamMapping  name="collisMap"  interpolation="../InterpolSuture" useCurvAbs="1" printLog="0"/>
				<Line proximity="0.0" group="1"  selfCollision="1" />
				<Point proximity="0.0" group="1" selfCollision="1"/>
		</Node>

		<Node name="VisuSuture">
			<MechanicalObject name="Quads" />
			<QuadSetTopologyContainer  name="ContainerSuture" />
			<QuadSetTopologyModifier   name="Modifier" />
			<QuadSetTopologyAlgorithms name="TopoAlgo"  template="Vec3d" />
			<QuadSetGeometryAlgorithms name="GeomAlgo"  template="Vec3d" />
			<Edge2QuadTopologicalMapping nbPointsOnEachCircle="10" radius="0.03" input="@../../topoLines_suture/meshLinesSuture" output="@ContainerSuture" flipNormals="true"/>
			<AdaptiveBeamMapping  name="VisuMapCath" useCurvAbs="1" printLog="0" interpolation="../InterpolSuture" input="@../DOFs" output="@Quads" isMechanical="false"  />

			<Node name="VisuOgl">
				<VisualModel  name="VisualBody" fileMesh="mesh/caducee_snake.obj"   />
				<IdentityMapping input="@../Quads" output="@VisualBody"/>
			</Node>
		</Node>


	</Node>


  <!-- <BilateralInteractionConstraint template="Rigid" object1="@BVH/6D_DOFs1/6D_Dof" object2="@AdaptiveBeam/ConstrainedFames/AttachedFrame" first_point="1" second_point="0" /> -->


 <!--
	<Node name="CollidedPoints">
		<MechanicalObject name="DOFs1" position="0 0 40" />
		<FixedConstraint name="m_fixedConstraint" indices="0" />
		<Point radius="10"/>
	</Node>


	<Node name="CollisionModel">
		<MeshObjLoader name="meshLoader" filename="mesh/phantom.obj" triangulate="true" flipNormals="1"/>
		<Mesh position="@meshLoader.position"  triangles="@meshLoader.triangles"/>
		<MechanicalObject name="DOFs1" position="0 0 400" scale="3" ry="90"/>
			<Triangle simulated="0" moving="0"/>
		<Line simulated="0" moving="0"/>
		<Point simulated="0" moving="0"/>
		<OglModel name="Visual" fileMesh="mesh/phantom.obj" color="1 0 0 0.3" scale="3" ry="90"/>
	</Node>


	-->
</Node>
