<?xml version="1.0"?>
<Node name="root" dt="0.002" showVisualModels="0" showBehaviorModels="1" showCollisionModels="1" showMappings="0" showForceFields="0" showWireFrame="0" gravity="0 0 0">
 	<FreeMotionAnimationLoop />
	<GenericConstraintSolver tolerance="1e-4"  maxIterations="100" unbuilt="false" printLog="0"/>

	<Node name="topoLines_suture">
		<WireRestShape template="Rigid" printLog="0" name="sutureRestShape" length="100"  straightLength="100" spireDiameter="1000.0" spireHeight="0.0"
					    densityOfBeams="15 15 0" numEdges="150" numEdgesCollis="150 0"  youngModulus="3e7" youngModulusExtremity="3e7"/>
		<EdgeSetTopologyContainer name="meshLinesSuture" />
		<EdgeSetTopologyModifier   name="Modifier" />
		<EdgeSetTopologyAlgorithms name="TopoAlgo"   template="Rigid" />
		<EdgeSetGeometryAlgorithms name="GeomAlgo"   template="Rigid" />
		<MechanicalObject template="Rigid" name="dofTopo1" />
	</Node>

	<Node name="AdaptiveBeam">
		<EulerImplicit rayleighStiffness="0.08" rayleighMass="0.08" printLog="false" />
		<BTDLinearSolver subpartSolve="0" verification="0" verbose="0"/>

		<EdgeSetTopologyContainer name="meshSuture" />
		<EdgeSetTopologyModifier   name="Modifier" />
		<EdgeSetTopologyAlgorithms name="TopoAlgo"   template="Rigid" />
		<EdgeSetGeometryAlgorithms name="GeomAlgo"   template="Rigid" />

		<MechanicalObject template="Rigid" name="DOFs" showIndices="0"/>

		<WireBeamInterpolation name="InterpolSuture" WireRestShape="@../topoLines_suture/sutureRestShape" radius="0.25" printLog="0" dofsAndBeamsAligned="false"/>
		<AdaptiveBeamForceFieldAndMass name="SutureForceField" interpolation="InterpolSuture" massDensity="1.15e-3" elongationFactor="100" />
		<SutureController template="Rigid" name="m_ircontroller" printLog="0"  startingPos="-100 0 0 0 0 0 1" interpolation="InterpolSuture"  threshold="0.25" maxBendingAngle="1e6"/>
	<!--	<AdaptiveBeamLengthConstraint interpolation="@InterpolSuture"/>	-->

		<LinearSolverConstraintCorrection printLog="false" wire_optimization="true"/>

		<FixedConstraint name="FixedConstraint" indices="0" />

		<Node name="ConstrainedFames">
			<MechanicalObject name="AttachedFrame" template="Rigid" position="0 0 0 0 0 0 1" />
			<AdaptiveBeamMapping  name="FrameMap"  interpolation="../InterpolSuture" useCurvAbs="1" printLog="0" points="100 0 0" />
			<ConstantForceField points="0" forces="1e8 0 0  0 0 0 1" />
		</Node>

		<Node name="Collis">
				<RegularGrid name="test"
				nx="120" ny="1" nz="1"
				xmin="0.0" xmax="100"
				ymin="0" ymax="0"
				zmin="0" zmax="0"
				/>
				<MechanicalObject name="CollisionDOFs" debugViewIndices="0"/>
				<AdaptiveBeamMapping  name="collisMap"  interpolation="../InterpolSuture" useCurvAbs="1" printLog="0"/>
				<Line proximity="0.0" group="1"  selfCollision="1" />
				<Point proximity="0.0" group="1" selfCollision="1"/>
		</Node>

		<Node name="VisuSuture">
			<MechanicalObject name="Quads" />
			<QuadSetTopologyContainer  name="ContainerSuture" />
			<QuadSetTopologyModifier   name="Modifier" />
			<QuadSetTopologyAlgorithms name="TopoAlgo"  template="Vec3d" />
			<QuadSetGeometryAlgorithms name="GeomAlgo"  template="Vec3d" />
			<Edge2QuadTopologicalMapping nbPointsOnEachCircle="6" radius="0.25" input="@../../topoLines_suture/meshLinesSuture" output="@ContainerSuture" flipNormals="true"/>
			<AdaptiveBeamMapping  name="VisuMapCath" useCurvAbs="1" printLog="0" interpolation="../InterpolSuture" input="@../DOFs" output="@Quads" isMechanical="false"  />

			<Node name="VisuOgl">
				<VisualModel  name="VisualBody" />
				<IdentityMapping input="@../Quads" output="@VisualBody"/>
			</Node>
		</Node>
	</Node>
</Node>
