<?xml version="1.0"?>
<Node name="root" dt="0.05"  gravity="0 0 0">
	<Node name="Plugins">
	    <RequiredPlugin pluginName="BeamAdapter"/> <!-- Needed to use components [MultiAdaptiveBeamMapping WireBeamInterpolation WireRestShape] -->
	    <RequiredPlugin pluginName="Sofa.Component.AnimationLoop"/> <!-- Needed to use components [FreeMotionAnimationLoop] -->
	    <RequiredPlugin pluginName="Sofa.Component.Collision.Detection.Algorithm"/> <!-- Needed to use components [BVHNarrowPhase BruteForceBroadPhase DefaultPipeline] -->
	    <RequiredPlugin pluginName="Sofa.Component.Collision.Detection.Intersection"/> <!-- Needed to use components [LocalMinDistance] -->
	    <RequiredPlugin pluginName="Sofa.Component.Collision.Geometry"/> <!-- Needed to use components [LineCollisionModel PointCollisionModel TriangleCollisionModel] -->
	    <RequiredPlugin pluginName="Sofa.Component.Collision.Response.Contact"/> <!-- Needed to use components [DefaultContactManager] -->
	    <RequiredPlugin pluginName="Sofa.Component.Constraint.Lagrangian.Correction"/> <!-- Needed to use components [LinearSolverConstraintCorrection] -->
	    <RequiredPlugin pluginName="Sofa.Component.Constraint.Lagrangian.Solver"/> <!-- Needed to use components [LCPConstraintSolver] -->
	    <RequiredPlugin pluginName="Sofa.Component.Constraint.Projective"/> <!-- Needed to use components [FixedProjectiveConstraint] -->
	    <RequiredPlugin pluginName="Sofa.Component.IO.Mesh"/> <!-- Needed to use components [MeshOBJLoader] -->
	    <RequiredPlugin pluginName="Sofa.Component.LinearSolver.Direct"/> <!-- Needed to use components [BTDLinearSolver] -->
	    <RequiredPlugin pluginName="Sofa.Component.Mapping.Linear"/> <!-- Needed to use components [IdentityMapping] -->
	    <RequiredPlugin pluginName="Sofa.Component.IntegrationSchemes.Backward"/> <!-- Needed to use components [EulerImplicitIntegrationScheme] -->
	    <RequiredPlugin pluginName="Sofa.Component.SolidMechanics.Spring"/> <!-- Needed to use components [RestShapeSpringsForceField] -->
	    <RequiredPlugin pluginName="Sofa.Component.StateContainer"/> <!-- Needed to use components [MechanicalObject] -->
	    <RequiredPlugin pluginName="Sofa.Component.Topology.Container.Constant"/> <!-- Needed to use components [MeshTopology] -->
	    <RequiredPlugin pluginName="Sofa.Component.Topology.Container.Dynamic"/> <!-- Needed to use components [EdgeSetGeometryAlgorithms EdgeSetTopologyContainer EdgeSetTopologyModifier QuadSetGeometryAlgorithms QuadSetTopologyContainer QuadSetTopologyModifier] -->
	    <RequiredPlugin pluginName="Sofa.Component.Topology.Container.Grid"/> <!-- Needed to use components [RegularGridTopology] -->
	    <RequiredPlugin pluginName="Sofa.Component.Topology.Mapping"/> <!-- Needed to use components [Edge2QuadTopologicalMapping] -->
	    <RequiredPlugin pluginName="Sofa.Component.Visual"/> <!-- Needed to use components [VisualStyle] -->
	    <RequiredPlugin pluginName="Sofa.GL.Component.Rendering3D"/> <!-- Needed to use components [OglModel] -->
	</Node>
    <VisualStyle displayFlags="showVisualModels showBehaviorModels showCollisionModels hideMappings hideForceFields" />
 	<DefaultVisualManagerLoop/>

 	<FreeMotionAnimationLoop />
	<LCPConstraintSolver mu="0.1" tolerance="1e-4" maxIt="1000" build_lcp="false" />

	<CollisionPipeline depth="6" verbose="1" draw="0"/>
	<BruteForceBroadPhase/>
	<BVHNarrowPhase/>
	<LocalMinDistance name="localmindistance" alarmDistance="2" contactDistance="1" angleCone="0.5" coneFactor="0.5" />
	<CollisionResponse name="Response" response="FrictionContactConstraint" />

<!-- INTERVENTIONAL RADIOLOGY INSTRUMENTS (catheter, guidewire, coil)  -->

	<Node name="topoLines_cath">
        <RodStraightSection name="StraightSection" youngModulus="10000" massDensity="0.00000155" radius="1" nbBeams="40" nbEdgesCollis="40" nbEdgesVisu="220" length="600.0"/><!--stiff silicone E = 10000 MPa // 1550 Kg/m3-->
        <RodSpireSection name="SpireSection" youngModulus="10000" massDensity="0.00000155" radius="1" nbBeams="10" nbEdgesCollis="10" nbEdgesVisu="80" length="400.0" spireDiameter="4000.0" spireHeight="0.0"/>

        <WireRestShape template="Rigid3d" name="catheterRestShape" wireMaterials="@StraightSection @SpireSection"/> <!-- silicone -->

		<EdgeSetTopologyContainer name="meshLinesCath" />
		<EdgeSetTopologyModifier   name="Modifier" />
		<EdgeSetGeometryAlgorithms name="GeomAlgo"   template="Rigid3d" />
		<MechanicalObject template="Rigid3d" name="dofTopo1" />
	</Node>
	<Node name="topoLines_guide">
        <RodStraightSection name="StraightSection" youngModulus="10000" massDensity="0.00000155" radius="0.9" nbBeams="50" nbEdgesCollis="50" nbEdgesVisu="196" length="980.0"/> <!--stiff silicone E = 10000 MPa // 1550 Kg/m3-->
        <RodSpireSection name="SpireSection" youngModulus="10000" massDensity="0.00000155" radius="0.9" nbBeams="10" nbEdgesCollis="10" nbEdgesVisu="4" length="20.0" spireDiameter="25" spireHeight="0.0"/>

        <WireRestShape template="Rigid3d" name="GuideRestShape" wireMaterials="@StraightSection @SpireSection"/>

		<EdgeSetTopologyContainer name="meshLinesGuide" />
		<EdgeSetTopologyModifier   name="Modifier" />
		<EdgeSetGeometryAlgorithms name="GeomAlgo"   template="Rigid3d" />
		<MechanicalObject template="Rigid3d" name="dofTopo2" />
	</Node>
	<Node name="topoLines_coils">
        <RodStraightSection name="StraightSection" youngModulus="168000" massDensity="0.000021" radius="0.1" nbBeams="30" nbEdgesCollis="30" nbEdgesVisu="360" length="540.0"/> <!-- platine E = 168000 MPa // 21000 Kg/m3-->
        <RodSpireSection name="SpireSection" youngModulus="168000" massDensity="0.000021" radius="0.1" nbBeams="30" nbEdgesCollis="30" nbEdgesVisu="40" length="60.0" spireDiameter="7" spireHeight="5.0"/>

        <WireRestShape template="Rigid3d" name="CoilRestShape" wireMaterials="@StraightSection @SpireSection"/>

		<EdgeSetTopologyContainer name="meshLinesCoils" />
		<EdgeSetTopologyModifier   name="Modifier" />
		<EdgeSetGeometryAlgorithms name="GeomAlgo"   template="Rigid3d" />
		<MechanicalObject template="Rigid3d" name="dofTopo3" />
	</Node>


	<Node name="InstrumentCombined">
		<EulerImplicitIntegrationScheme rayleighStiffness="0.2" rayleighMass="0.1" printLog="false" />
		<BTDLinearSolver subpartSolve="0" verification="0" verbose="0"/>
		<RegularGridTopology name="meshLinesCombined"
            nx="181" ny="1" nz="1"
            xmin="0.0" xmax="1.0"
            ymin="0" ymax="0"
            zmin="1" zmax="1"
		/>
		<MechanicalObject template="Rigid3d" name="DOFs" showIndices="0" ry="-90"/>

		<WireBeamInterpolation name="InterpolCatheter" WireRestShape="@../topoLines_cath/catheterRestShape"/>
		<AdaptiveBeamForceFieldAndMass name="CatheterForceField" interpolation="@InterpolCatheter" />

		<WireBeamInterpolation name="InterpolGuide" WireRestShape="@../topoLines_guide/GuideRestShape"/>
		<AdaptiveBeamForceFieldAndMass name="GuideForceField" interpolation="@InterpolGuide"/>

		<WireBeamInterpolation name="InterpolCoils" WireRestShape="@../topoLines_coils/CoilRestShape"/>
		<AdaptiveBeamForceFieldAndMass name="CoilsForceField" interpolation="@InterpolCoils"/>

        <BeamAdapterActionController name="AController" interventionController="@IRController" writeMode="0"
            timeSteps="4.3 7.5 7.65 7.85 8.05 8.25 8.45 8.7 8.9 9.2 9.4 9.6 9.8 10 10.25 10.4 10.65 10.85 11.05 11.25 11.45 11.7 11.95 12.2 12.4 12.6 12.8 13 13.2 13.4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"
            actions="1 1 1 1 1 1 1 1 1 1 1 1 1 1 1 1 1 1 1 1 1 1 1 1 1 1 1 1 1 1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"
        />
		<InterventionalRadiologyController template="Rigid3d" name="IRController" printLog="0" xtip="1 0 0"  step="3" rotationInstrument="0 0 0"
							controlledInstrument="0" startingPos="0 0 0 0 -0.7071068 0 0.7071068" speed="2" instruments="InterpolCatheter InterpolGuide InterpolCoils" />

		<LinearSolverConstraintCorrection printLog="false" wire_optimization="true"/>

		<FixedProjectiveConstraint name="FixedConstraint" indices="0" />
        <RestShapeSpringsForceField  points="@IRController.indexFirstNode" stiffness="1e8" angularStiffness="1e8"   />

		<Node name="Collis" activated="true">
				<EdgeSetTopologyContainer name="collisEdgeSet" />
				<EdgeSetTopologyModifier   name="colliseEdgeModifier" />
				<MechanicalObject name="CollisionDOFs"/>
				<MultiAdaptiveBeamMapping  name="collisMap"  controller="../IRController" useCurvAbs="1" printLog="0"/>
				<LineCollisionModel contactDistance="0.0" group="1"/>
				<PointCollisionModel contactDistance="0.0" group="1"/>
		</Node>

		<Node name="VisuCatheter" activated="true">
			<OglModel name="Visual" color="0.7 0.7 0.7"  quads="@../ContainerCath.quads" material="texture Ambient 1 0.2 0.2 0.2 0.0 Diffuse 1 1.0 1.0 1.0 1.0 Specular 1 1.0 1.0 1.0 1.0 Emissive 0 0.15 0.05 0.05 0.0 Shininess 1 20"/>
			<QuadSetTopologyContainer  name="ContainerCath" />
			<QuadSetTopologyModifier   name="Modifier" />
			<QuadSetGeometryAlgorithms name="GeomAlgo"  template="Vec3d" />
			<Edge2QuadTopologicalMapping nbPointsOnEachCircle="10" radius="2" input="@../../topoLines_cath/meshLinesCath" output="@ContainerCath" flipNormals="true"/>

			<AdaptiveBeamMapping  name="VisuMapCath" useCurvAbs="1" printLog="0" interpolation="@../InterpolCatheter" input="@../DOFs" output="@Visual"  />
		</Node>

		<Node name="VisuGuide" activated="true">
			<OglModel name="Visual" color="0.2 0.2 0.8"  material="texture Ambient 1 0.2 0.2 0.2 0.0 Diffuse 1 1.0 1.0 1.0 1.0 Specular 1 1.0 1.0 1.0 1.0 Emissive 0 0.15 0.05 0.05 0.0 Shininess 1 20" quads="@../ContainerGuide.quads"/>
			<QuadSetTopologyContainer  name="ContainerGuide" />
			<QuadSetTopologyModifier   name="Modifier" />
			<QuadSetGeometryAlgorithms name="GeomAlgo"  template="Vec3d" />
			<Edge2QuadTopologicalMapping nbPointsOnEachCircle="10" radius="1" input="@../../topoLines_guide/meshLinesGuide" output="@ContainerGuide"  flipNormals="true" listening="true"/>
			<AdaptiveBeamMapping  name="visuMapGuide" useCurvAbs="1" printLog="0" interpolation="@../InterpolGuide" input="@../DOFs" output="@Visual" />
		</Node>

		<Node name="VisuCoils" activated="true">
			<OglModel name="Visual" color="0.2 0.8 0.2"  material="texture Ambient 1 0.2 0.2 0.2 0.0 Diffuse 1 1.0 1.0 1.0 1.0 Specular 1 1.0 1.0 1.0 1.0 Emissive 0 0.15 0.05 0.05 0.0 Shininess 1 20" quads="@../ContainerCoils.quads"/>
			<QuadSetTopologyContainer  name="ContainerCoils" />
			<QuadSetTopologyModifier   name="Modifier" />
			<QuadSetGeometryAlgorithms name="GeomAlgo"  template="Vec3d" />
			<Edge2QuadTopologicalMapping nbPointsOnEachCircle="10" radius="0.3"  input="@../../topoLines_coils/meshLinesCoils" output="@ContainerCoils"  flipNormals="true" listening="true" />
			<AdaptiveBeamMapping  name="visuMapCoils" useCurvAbs="1" printLog="0" interpolation="@../InterpolCoils" input="@../DOFs" output="@Visual" />
		</Node>
	</Node>

	<Node name="VesselsPhantom">
		<MeshOBJLoader name="meshLoader" filename="mesh/phantom.obj" triangulate="true" flipNormals="1" scale="3" rotation="0 90 0"/>

		<Node name="Collision">
			<MeshTopology position="@../meshLoader.position"  triangles="@meshLoader.triangles"/>
			<MechanicalObject name="DOFs1"/>
			<TriangleCollisionModel simulated="0" moving="0"/>
			<LineCollisionModel simulated="0" moving="0"/>
			<PointCollisionModel simulated="0" moving="0"/>
		</Node>

		<Node name="Visual">
			<OglModel name="Visual" src="@../meshLoader" color="1 0 0 0.3" />
		</Node>

	</Node>

</Node>
