# -*- coding: utf-8 -*-
# units: mm, kg, s
import Sofa

import os
import math
path = os.path.dirname(os.path.abspath(__file__))+'/mesh/'

################################################################
###                   Scene Configuration                    ###
################################################################

###      Mesh Files     ###
scalaTympaniFile = 'Mesh/ST_RW.vtk'
basilarMembrane = 'Mesh/BM.vtk'

###    Position of the array ###
posElectrode = "6.5 0.5 0.3"

### Orientation of the array ###
rx = 0          # rotation initiale electrode selon x (degrees)
ry = -40        # rotation initiale electrode selon y (degrees)
rz = 160        # rotation initiale electrode selon z (degrees)

################################################################
###                End of Scene Configuration                ###
################################################################


cy = math.cos(math.pi/180*rz * 0.5);
sy = math.sin(math.pi/180*rz * 0.5);
cr = math.cos(math.pi/180*ry * 0.5);
sr = math.sin(math.pi/180*ry * 0.5);
cp = math.cos(math.pi/180*rx * 0.5);
sp = math.sin(math.pi/180*rx * 0.5);

qx = cy * sr * cp - sy * cr * sp;
qy = cy * cr * sp + sy * sr * cp;
qz = sy * cr * cp - cy * sr * sp;
qw = cy * cr * cp + sy * sr * sp;

electrodeArrayStartPosition = posElectrode + " " + str(qx)+ " " + str(qy)+ " " + str(qz)+ " " + str(qw)

def createScene(rootNode):
        rootNode.createObject('RequiredPlugin',name='BeamAdapter', pluginName='BeamAdapter')
        rootNode.createObject('RequiredPlugin',name='SofaShells', pluginName='SofaShells')
        rootNode.createObject('RequiredPlugin',name='SoftRobots', pluginName='SoftRobots')
        rootNode.createObject('RequiredPlugin',name='SofaPython', pluginName='SofaPython')
        rootNode.findData('dt').value=0.01
        rootNode.findData('gravity').value='0 0 0'
        rootNode.createObject('VisualStyle', displayFlags='showVisualModels hideBehaviorModels showCollisionModels hideMappings hideForceFields showInteractionForceFields hideWireframe')
        rootNode.createObject('FreeMotionAnimationLoop')
        rootNode.createObject('GenericConstraintSolver', tolerance="1e-5", maxIterations="5000", unbuilt="false")
        rootNode.createObject('CollisionPipeline', depth="6", verbose="0", draw="1")
        rootNode.createObject('BruteForceDetection', name="N2")
        rootNode.createObject('CollisionResponse', response="FrictionContact", responseParams="mu=0.50")
        rootNode.createObject('LocalMinDistance', name="Proximity", alarmDistance="0.3", contactDistance="0.25", angleCone="0.001")

        cochleaNode = rootNode.createChild('cochleaNode')
        #cochleaNode.createObject('MeshObjLoader', name='loader', filename='Mesh/cochleeCompleteTroueeSimpleOrientationMegaTrou.obj', flipNormals="false")
        cochleaNode.createObject('MeshVTKLoader', name='loader', filename=scalaTympaniFile, flipNormals="true")
        cochleaNode.createObject('Mesh',src = '@loader')
        cochleaNode.createObject('MechanicalObject', name='dofs', template='Vec3d', showIndices='false', showIndicesScale='4e-5', rx='0',printLog="0")
        cochleaNode.createObject('Triangle', group='1')
        cochleaNode.createObject('Line', group='1')
        cochleaNode.createObject('Point', group='1')
        visuCochleaNode = cochleaNode.createChild('visuCochleaNode')
        visuCochleaNode.createObject('OglModel', name="VisualModel", color="3.0 0.5 0.0 0.9")

        membraneNode = rootNode.createChild('membraneNode')
        membraneNode.createObject('EulerImplicitSolver', rayleighStiffness='0.01', rayleighMass='0.03')
        membraneNode.createObject('SparseLDLSolver')
#        membraneNode.createObject('MeshObjLoader', name='loader', filename='Mesh/membraneBasilaireBetterFit.obj', flipNormals="false")
        membraneNode.createObject('MeshVTKLoader', name='loader', filename=basilarMembrane, flipNormals="false")
        membraneNode.createObject('Vertex2Frame', name="frames", template="Rigid", position="@loader.position", normals="@loader.normals", invertNormals="false")
        #membraneNode.createObject('Mesh',src ='@loader')
        membraneNode.createObject('MechanicalObject', name='MO', template="Rigid", position="@frames.frames", showIndices="false", showIndicesScale="0.000005")
        membraneNode.createObject('WriteState',filename="output/membrane.state", writeX="1", writeV="0")

        membraneNode.createObject('TriangleSetTopologyContainer', name="coarseTopo", src="@loader")

        membraneNode.createObject('UniformMass', showAxisSizeFactor="0.1", totalMass="0.001")
#        membraneNode.createObject('TriangularShellForceField', name="FEM", youngModulus="1e4", poissonRatio="0.33", rayleighStiffness="0", thickness="4.0e-1", measure="Strain (norm)")
        membraneNode.createObject('TriangularShellForceField', name="FEM", youngModulus="0.7", poissonRatio="0.33", rayleighStiffness="0", thickness="4.0e-1", measure="Strain (norm)")
        #membraneNode.createObject('RestShapeSpringsForceField', points="7 8 10 11 12 13 14 19 20 22 23 35 36 51 52 53 56 57 58 60 61 62 64 67 80 81 82 83 89 90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", stiffness="1000000", angularStiffness="100000")
        membraneNode.createObject('RestShapeSpringsForceField', points="  8  15  16  23  24  31  32  39  40  47  48  55  56  63  64  71 72  79  80  87  88  95  96 103 104 111 112 119 120 127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", stiffness="1000000", angularStiffness="100000")
        membraneNode.createObject('LinearSolverConstraintCorrection')

        collMembraneNode = membraneNode.createChild('collMembraneNode')
        collMembraneNode.createObject('MechanicalObject', name="Coll_MO", template="Vec3d", src="@../loader")
        collMembraneNode.createObject('Triangle', bothSide="1", group='1')
        collMembraneNode.createObject('Line', bothSide="1", group='1')
        collMembraneNode.createObject('Point', bothSide="1", group='1')
        collMembraneNode.createObject('IdentityMapping', input="@../MO", output="@Coll_MO")

        visuMembraneNode = membraneNode.createChild('visuMembraneNode')
        visuMembraneNode.createObject('OglModel', name="Visual", color="red")
        visuMembraneNode.createObject('IdentityMapping')

        topoLines_cath = rootNode.createChild('topoLines_cath')
        #topoLines_cath.createObject('WireRestShape', template="Rigid", printLog="true", name="catheterRestShape", length="20", straightLength="20", spireDiameter="0", spireHeight="0.0", densityOfBeams="40", numEdges="20", numEdgesCollis="20", youngModulus="2.5e5", youngModulusExtremity="2.5e5", radius="@../Proximity.contactDistance")
        topoLines_cath.createObject('WireRestShape', template="Rigid", printLog="true", name="catheterRestShape", length="30", straightLength="30", spireDiameter="0", spireHeight="0.0", densityOfBeams="100", numEdges="100", numEdgesCollis="30", youngModulus="2.3e4", youngModulusExtremity="2.5e5", radius="@../Proximity.contactDistance")
        topoLines_cath.createObject('MechanicalObject', template="Rigid", name="dofTopo1")#, translation = "-15 0 0")
        topoLines_cath.createObject('EdgeSetTopologyContainer', name="meshLinesCath")
        topoLines_cath.createObject('EdgeSetTopologyModifier', name="Modifier")
        topoLines_cath.createObject('EdgeSetTopologyAlgorithms', name="TopoAlgo", template="Rigid")
        topoLines_cath.createObject('EdgeSetGeometryAlgorithms', name="GeomAlgo", template="Rigid")


        RefStartingPos = rootNode.createChild('RefStartingPos')
        #RefStartingPos.createObject('MechanicalObject', name="ReferencePos", template="Rigid", position="-3 1.5 0.3  1 0 0 0")
        RefStartingPos.createObject('MechanicalObject', name="ReferencePos", template="Rigid", position=electrodeArrayStartPosition)

        InstrumentCombined = rootNode.createChild('InstrumentCombined')
        InstrumentCombined.createObject('EulerImplicitSolver', rayleighStiffness="0.01", rayleighMass="0.03", printLog="true" )
        InstrumentCombined.createObject('BTDLinearSolver')
        InstrumentCombined.createObject('RegularGrid', name="meshLinesCombined", nx="100", ny="1", nz="1")

        InstrumentCombined.createObject('MechanicalObject', template="Rigid", name="DOFs" )
        InstrumentCombined.createObject('WriteState',filename="output/beam.state", writeX="1", writeV="0")
        InstrumentCombined.createObject('InterventionalRadiologyController', template="Rigid", name="m_ircontroller", printLog="true", xtip="0.1",speed ='2',   step="0.1", rotationInstrument="0", controlledInstrument="0", startingPos="@../RefStartingPos/ReferencePos.position", instruments="InterpolCatheter")
        InstrumentCombined.createObject('WireBeamInterpolation', name="InterpolCatheter", WireRestShape="@../topoLines_cath/catheterRestShape", radius="@../Proximity.contactDistance", printLog="true")
        InstrumentCombined.createObject('AdaptiveBeamForceFieldAndMass', name="CatheterForceField", massDensity="0.000005", interpolation="@InterpolCatheter", printLog="true")
	InstrumentCombined.createObject('LinearSolverConstraintCorrection', printLog="true", wire_optimization="true")
	InstrumentCombined.createObject("FixedConstraint", indices="0")
	InstrumentCombined.createObject('RestShapeSpringsForceField', name="MeasurementFF", points="@m_ircontroller.indexFirstNode",  stiffness="1e10", recompute_indices="1", angularStiffness="1e7", external_rest_shape="@../RefStartingPos/ReferencePos", external_points="0", drawSpring="1", springColor="1 0 0 1")
        InstrumentCombined.createObject('PythonScriptController', filename="measureArrayForceController.py", classname="BaseForceMeasurement")


	CollisInstrumentCombined = InstrumentCombined.createChild('CollisInstrumentCombined')
	CollisInstrumentCombined.createObject('EdgeSetTopologyContainer', name="collisEdgeSet")
	CollisInstrumentCombined.createObject('EdgeSetTopologyModifier', name="colliseEdgeModifier")
	CollisInstrumentCombined.createObject('MechanicalObject', name="CollisionDOFs")
	CollisInstrumentCombined.createObject('MultiAdaptiveBeamMapping', name="multimapp", ircontroller="../m_ircontroller", useCurvAbs="1", printLog="false")
	CollisInstrumentCombined.createObject('Line', selfCollision="1", LineActiverPath="../m_ircontroller")
	CollisInstrumentCombined.createObject('Point', selfCollision="1", PointActiverPath="../m_ircontroller")

        visuInstrumentCombined = InstrumentCombined.createChild('visuInstrumentCombined')
        visuInstrumentCombined.createObject('MechanicalObject', name="Quads")
        visuInstrumentCombined.createObject('QuadSetTopologyContainer', name="ContainerCath")
        visuInstrumentCombined.createObject('QuadSetTopologyModifier', name="Modifier" )
        visuInstrumentCombined.createObject('QuadSetTopologyAlgorithms', name="TopoAlgo", template="Vec3d")
        visuInstrumentCombined.createObject('QuadSetGeometryAlgorithms', name="GeomAlgo", template="Vec3d")
        visuInstrumentCombined.createObject('Edge2QuadTopologicalMapping', nbPointsOnEachCircle="10", radius="@../../Proximity.contactDistance", input="@../../topoLines_cath/meshLinesCath", output="@ContainerCath", flipNormals="true",printLog="1")
        visuInstrumentCombined.createObject('AdaptiveBeamMapping', name="VisuMapCath", useCurvAbs="1", printLog="1", isMechanical="false",  interpolation="@../InterpolCatheter",proximity = 0)


        realVisuInstrumentCombined = visuInstrumentCombined.createChild('realVisuInstrumentCombined')
        realVisuInstrumentCombined.createObject('OglModel',name="VisualCathOGL", src="@../ContainerCath", color="white")
        realVisuInstrumentCombined.createObject('IdentityMapping', input="@../Quads", output="@VisualCathOGL")
