<?xml version="1.0"?>
<Node name="root" gravity="0 -9.81 0" dt="0.01" bbox="0 0 0 10 10 10">
    <RequiredPlugin pluginName="BeamAdapter"/> <!-- Needed to use components [MultiAdaptiveBeamMapping WireBeamInterpolation WireRestShape] -->
    <RequiredPlugin pluginName="Sofa.Component.AnimationLoop"/> <!-- Needed to use components [FreeMotionAnimationLoop] -->
    <RequiredPlugin pluginName="Sofa.Component.Collision.Detection.Algorithm"/> <!-- Needed to use components [BVHNarrowPhase BruteForceBroadPhase DefaultPipeline] -->
    <RequiredPlugin pluginName="Sofa.Component.Collision.Detection.Intersection"/> <!-- Needed to use components [LocalMinDistance] -->
    <RequiredPlugin pluginName="Sofa.Component.Collision.Geometry"/> <!-- Needed to use components [LineCollisionModel PointCollisionModel TriangleCollisionModel] -->
    <RequiredPlugin pluginName="Sofa.Component.Collision.Response.Contact"/> <!-- Needed to use components [DefaultContactManager] -->
    <RequiredPlugin pluginName="Sofa.Component.Constraint.Lagrangian.Correction"/> <!-- Needed to use components [LinearSolverConstraintCorrection] -->
    <RequiredPlugin pluginName="Sofa.Component.Constraint.Lagrangian.Solver"/> <!-- Needed to use components [LCPConstraintSolver] -->
    <RequiredPlugin pluginName="Sofa.Component.Constraint.Projective"/> <!-- Needed to use components [FixedProjectiveConstraint] -->
    <RequiredPlugin pluginName="Sofa.Component.IO.Mesh"/> <!-- Needed to use components [MeshSTLLoader] -->
    <RequiredPlugin pluginName="Sofa.Component.LinearSolver.Direct"/> <!-- Needed to use components [BTDLinearSolver] -->
    <RequiredPlugin pluginName="Sofa.Component.IntegrationSchemes.Backward"/> <!-- Needed to use components [EulerImplicitIntegrationScheme] -->
    <RequiredPlugin pluginName="Sofa.Component.SolidMechanics.Spring"/> <!-- Needed to use components [RestShapeSpringsForceField] -->
    <RequiredPlugin pluginName="Sofa.Component.StateContainer"/> <!-- Needed to use components [MechanicalObject] -->
    <RequiredPlugin pluginName="Sofa.Component.Topology.Container.Constant"/> <!-- Needed to use components [MeshTopology] -->
    <RequiredPlugin pluginName="Sofa.Component.Topology.Container.Dynamic"/> <!-- Needed to use components [EdgeSetGeometryAlgorithms EdgeSetTopologyContainer EdgeSetTopologyModifier] -->
    <RequiredPlugin pluginName="Sofa.Component.Topology.Container.Grid"/> <!-- Needed to use components [RegularGridTopology] -->
    <RequiredPlugin pluginName="Sofa.Component.Visual"/> <!-- Needed to use components [VisualStyle] -->
    <VisualStyle displayFlags="hideVisualModels hideBehaviorModels showCollisionModels hideMappings showInteractionForceFields" />

    <FreeMotionAnimationLoop />
    <DefaultVisualManagerLoop />

    <LCPConstraintSolver mu="0.1" tolerance="1e-4" maxIt="1000" build_lcp="false" />
    <CollisionPipeline draw="0" depth="6" />
    <BruteForceBroadPhase name="N2" />
    <BVHNarrowPhase />
    <LocalMinDistance name="localmindistance" contactDistance="0.1" alarmDistance="2" angleCone="0.2" />
    <CollisionResponse name="Response" response="FrictionContactConstraint" />


    <Node name="EdgeTopology">
        <RodStraightSection name="StraightSection" youngModulus="20000" radius="0.9" massDensity="0.00000155" poissonRatio="0.3" nbBeams="50" nbEdgesCollis="50" nbEdgesVisu="200" length="980.0"/>
        <RodSpireSection name="SpireSection" youngModulus="20000" radius="0.9" massDensity="0.00000155" poissonRatio="0.3" nbBeams="10" nbEdgesCollis="10" nbEdgesVisu="200" length="20.0" spireDiameter="25" spireHeight="0.0"/>

        <WireRestShape template="Rigid3d" name="BeamRestShape" wireMaterials="@StraightSection @SpireSection"/>

        <EdgeSetTopologyContainer name="meshLinesBeam"/>
        <EdgeSetTopologyModifier name="Modifier"/>
        <EdgeSetGeometryAlgorithms name="GeomAlgo" template="Rigid3d" />
        <MechanicalObject name="dofTopo2" template="Rigid3d" />
    </Node>

    <Node name="BeamModel">
        <EulerImplicitIntegrationScheme rayleighStiffness="0.2" rayleighMass="0.1" printLog="false" />
        <BTDLinearSolver verbose="0"/>
        <RegularGridTopology name="MeshLines" nx="61" ny="1" nz="1"
                                    xmax="0.0" xmin="0.0" ymin="0" ymax="0" zmax="0" zmin="0"
                                    p0="0 0 0" drawEdges="1"/>
        <MechanicalObject template="Rigid3d" name="DOFs Container" ry="-90"/>

        <WireBeamInterpolation name="BeamInterpolation" WireRestShape="@../EdgeTopology/BeamRestShape"/>
        <AdaptiveBeamForceFieldAndMass name="BeamForceField" interpolation="@BeamInterpolation"/>
        <InterventionalRadiologyController name="DeployController" template="Rigid3d" instruments="BeamInterpolation"
                                    topology="@MeshLines" startingPos="0 0 0  0 -0.7071068 0 0.7071068" xtip="0" printLog="1"
                                    rotationInstrument="0" step="5" speed="5"
                                    listening="1" controlledInstrument="0"/>
        <LinearSolverConstraintCorrection wire_optimization="true" printLog="0" />
        <FixedProjectiveConstraint name="FixedConstraint" indices="0" />
        <RestShapeSpringsForceField name="RestSPForceField" points="@DeployController.indexFirstNode" angularStiffness="1e8" stiffness="1e8"/>

        <Node name="CollisionModel">
            <EdgeSetTopologyContainer name="collisEdgeSet" />
            <EdgeSetTopologyModifier name="colliseEdgeModifier" />
            <MechanicalObject name="CollisionDOFs" />
            <MultiAdaptiveBeamMapping controller="../DeployController" useCurvAbs="1" printLog="0" name="collisMap" />
            <LineCollisionModel contactDistance="0.0" />
            <PointCollisionModel contactDistance="0.0" />
        </Node>
    </Node>

    <Node name="Carotids">
        <MeshSTLLoader filename="mesh/carotids.stl" flipNormals="0" triangulate="1" name="meshLoader" rotation="10.0 0.0 -90.0" />
        <MeshTopology position="@meshLoader.position" triangles="@meshLoader.triangles" />
        <MechanicalObject position="0 0 400" scale="3" name="DOFs1" ry="90" />
        <TriangleCollisionModel moving="0" simulated="0" />
        <LineCollisionModel moving="0" simulated="0" />
    </Node>
</Node>
