<?xml version="1.0"?>
<Node name="root" dt="0.1" gravity="0 0 -9810">

	<RequiredPlugin pluginName="BeamAdapter SofaMiscCollision"/>

 	<VisualStyle displayFlags="showVisualModels showBehaviorModels showCollisionModels hideMappings hideForceFields" />

	<GenericConstraintSolver maxIterations="1000" tolerance="1e-6"/>
	<FreeMotionAnimationLoop/>

	<CollisionPipeline depth="6" verbose="1" draw="0"/>
	<BruteForceBroadPhase/>
	<BVHNarrowPhase/>
	<LocalMinDistance name="localmindistance" alarmDistance="5" contactDistance="2" />
	<CollisionResponse name="Response" response="FrictionContact" />
	<CollisionGroup name="Group" />


	<Node name="tube_0">
		<MeshObjLoader filename="tube.obj"/>
		<WireRestShape template="Rigid" printLog="1" name="restShape" isAProceduralShape="false"
			densityOfBeams="100" numEdges="200" numEdgesCollis="40"  youngModulus="10000"
			draw="true"/>

		<EdgeSetTopologyContainer name="meshLines" />
		<EdgeSetTopologyModifier   name="Modifier" />
		<EdgeSetTopologyAlgorithms name="TopoAlgo"   template="Rigid" />
		<EdgeSetGeometryAlgorithms name="GeomAlgo"   template="Rigid"/>
		<MechanicalObject template="Rigid" name="dofTopo1" />
	</Node>

</Node>
